<?xml version="1.0" encoding="UTF-8"?>
<neuroml xmlns="http://www.neuroml.org/schema/neuroml2" xmlns:xsi="http://www.w3.org/2001/XMLSchema-instance" xsi:schemaLocation="http://www.neuroml.org/schema/neuroml2  https://raw.githubusercontent.com/NeuroML/NeuroML2/development/Schemas/NeuroML2/NeuroML_v2beta4.xsd" id="A140612_nml2">

    <include href="bk.channel.nml"/>
    <include href="HVACa.channel.nml"/>
    <include href="MVACa.channel.nml"/>
    <include href="iA.channel.nml"/>
    <include href="iH__q101_44732.channel.nml"/>
    <include href="kslow.channel.nml"/>
    <include href="na.channel.nml"/>
    <include href="na__vshifth3__vshiftm7.channel.nml"/>
    <include href="na__vshifthmin9_60842__vshiftmmin10_9975.channel.nml"/>
    <include href="pas.channel.nml"/>
    <include href="sk.channel.nml"/>

    <cell id="A140612_nml2">

        <notes>Cell: a_soma exported from NEURON ModelView</notes>

        <morphology id="morphology_A140612_nml2">

            <segment id="0" name="Seg0_a_soma">
                <proximal x="-28.365" y="-16.1476" z="0.0553361" diameter="5.91798"/>
                <distal x="-27.6831" y="-17.6203" z="0.0531628" diameter="10.1259"/>
            </segment>

            <segment id="2" name="Seg1_a_soma">
                <parent segment="0"/>
                <distal x="-27.0012" y="-19.093" z="0.0509895" diameter="11.1723"/>
            </segment>

            <segment id="3" name="Seg2_a_soma">
                <parent segment="2"/>
                <distal x="-26.3192" y="-20.5656" z="0.0488163" diameter="12.2188"/>
            </segment>

            <segment id="4" name="Seg3_a_soma">
                <parent segment="3"/>
                <distal x="-25.6373" y="-22.0383" z="0.046643" diameter="13.2688"/>
            </segment>

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
            <segmentGroup id="a_soma" neuroLexId="sao864921383">    <!--
                This group contains an unbranched set of segments, and all of the segmentGroups marked with
                neuroLexId = sao864921383 form a non-overlapping set of all of the segments.
                These segmentGroups correspond to the 'cables' of NeuroML v1.8.1. -->

                <member segment="0"/>

                <member segment="2"/>

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            </segmentGroup>

            <segmentGroup id="hill" neuroLexId="sao864921383">    <!--
                This group contains an unbranched set of segments, and all of the segmentGroups marked with
                neuroLexId = sao864921383 form a non-overlapping set of all of the segments.
                These segmentGroups correspond to the 'cables' of NeuroML v1.8.1. -->

                <!--This 'Section' has number of internal divisions (nseg) = 5-->

                <property tag="numberInternalDivisions" value="5"/>

                <member segment="4205"/>

                <member segment="4206"/>

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            </segmentGroup>

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
            <segmentGroup id="soma_group" neuroLexId="GO:0043025">    <!--Soma group-->

                <include segmentGroup="a_soma"/>
            </segmentGroup>

            <segmentGroup id="soma_iseg_hill_nodes_group">
                <include segmentGroup="a_soma"/>
                <include segmentGroup="hill"/>
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            </segmentGroup>

            <segmentGroup id="soma_iseg_hill_myelin_group">
                <include segmentGroup="a_soma"/>
                <include segmentGroup="hill"/>
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            </segmentGroup>

            <segmentGroup id="dendold">
                <include segmentGroup="hill"/>
                <include segmentGroup="apic_0"/>
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            </segmentGroup>

            <segmentGroup id="hill_group">
                <include segmentGroup="hill"/>
            </segmentGroup>

            <segmentGroup id="axon_group" neuroLexId="GO:0030424">    <!--Axon group-->

                <include segmentGroup="hill"/>
                <include segmentGroup="iseg"/>
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            </segmentGroup>

            <segmentGroup id="dendrite_group" neuroLexId="GO:0030425">    <!--Dendrite group-->

                <include segmentGroup="apic_0"/>
                <include segmentGroup="dend_41"/>
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            </segmentGroup>

            <segmentGroup id="apical_dend_group">
                <include segmentGroup="apic_0"/>
                <include segmentGroup="apic_76"/>
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
                <inhomogeneousParameter id="PathLengthApicalDends" variable="p" metric="Path Length from root">
                </inhomogeneousParameter>

            </segmentGroup>

            <segmentGroup id="basal_dend_group">
                <include segmentGroup="dend_41"/>
                <include segmentGroup="dend_30"/>
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            </segmentGroup>

            <segmentGroup id="iseg_group">
                <include segmentGroup="iseg"/>
            </segmentGroup>

            <segmentGroup id="nodes_group">
                <include segmentGroup="node_0"/>
                <include segmentGroup="node_1"/>
            </segmentGroup>

            <segmentGroup id="myelin_group">
                <include segmentGroup="myelin_0"/>
                <include segmentGroup="myelin_1"/>
            </segmentGroup>

            <segmentGroup id="apic41_group">
                <include segmentGroup="apic_41"/>
            </segmentGroup>

        </morphology>

            <!--Adding the biophysical parameters-->

        <biophysicalProperties id="biophys">

            <membraneProperties>

                <channelDensity condDensity="0.122971 mS_per_cm2" id="bk_basal_dend_group" ionChannel="bk" segmentGroup="basal_dend_group" ion="k" erev="-100.0 mV"/>

                <channelDensity condDensity="4.0 mS_per_cm2" id="bk_nodes_group" ionChannel="bk" segmentGroup="nodes_group" ion="k" erev="-100.0 mV"/>

                <channelDensity condDensity="4.0 mS_per_cm2" id="bk_myelin_group" ionChannel="bk" segmentGroup="myelin_group" ion="k" erev="-100.0 mV"/>

                <channelDensity condDensity="4.0 mS_per_cm2" id="bk_iseg_group" ionChannel="bk" segmentGroup="iseg_group" ion="k" erev="-100.0 mV"/>

                <channelDensity condDensity="4.0 mS_per_cm2" id="bk_hill_group" ionChannel="bk" segmentGroup="hill_group" ion="k" erev="-100.0 mV"/>

                <channelDensity condDensity="0.0638741 mS_per_cm2" id="bk_soma_group" ionChannel="bk" segmentGroup="soma_group" ion="k" erev="-100.0 mV"/>

                <channelDensity condDensity="100.0 mS_per_cm2" id="iA_nodes_group" ionChannel="iA" segmentGroup="nodes_group" ion="k" erev="-100.0 mV"/>

                <channelDensity condDensity="100.0 mS_per_cm2" id="iA_iseg_group" ionChannel="iA" segmentGroup="iseg_group" ion="k" erev="-100.0 mV"/>

                <channelDensity condDensity="100.0 mS_per_cm2" id="iA_hill_group" ionChannel="iA" segmentGroup="hill_group" ion="k" erev="-100.0 mV"/>

                <channelDensity condDensity="33.165 mS_per_cm2" id="iA_myelin_group" ionChannel="iA" segmentGroup="myelin_group" ion="k" erev="-100.0 mV"/>

                <channelDensity condDensity="35.99324 mS_per_cm2" id="iA_soma_group" ionChannel="iA" segmentGroup="soma_group" ion="k" erev="-100.0 mV"/>

                <channelDensity condDensity="35.99324 mS_per_cm2" id="iA_basal_dend_group" ionChannel="iA" segmentGroup="basal_dend_group" ion="k" erev="-100.0 mV"/>

                <channelDensity condDensity="0.25117 mS_per_cm2" id="iH_soma_group" ionChannel="iH__q101_44732" segmentGroup="soma_group" ion="h" erev="-33.0 mV"/>

                <channelDensity condDensity="0.25117 mS_per_cm2" id="iH_basal_dend_group" ionChannel="iH__q101_44732" segmentGroup="basal_dend_group" ion="h" erev="-33.0 mV"/>

                <channelDensity condDensity="150.0 mS_per_cm2" id="kslow_nodes_group" ionChannel="kslow" segmentGroup="nodes_group" ion="k" erev="-100.0 mV"/>

                <channelDensity condDensity="150.0 mS_per_cm2" id="kslow_iseg_group" ionChannel="kslow" segmentGroup="iseg_group" ion="k" erev="-100.0 mV"/>

                <channelDensity condDensity="150.0 mS_per_cm2" id="kslow_hill_group" ionChannel="kslow" segmentGroup="hill_group" ion="k" erev="-100.0 mV"/>

                <channelDensity condDensity="20.5886 mS_per_cm2" id="kslow_myelin_group" ionChannel="kslow" segmentGroup="myelin_group" ion="k" erev="-100.0 mV"/>

                <channelDensity condDensity="20.96737 mS_per_cm2" id="kslow_soma_group" ionChannel="kslow" segmentGroup="soma_group" ion="k" erev="-100.0 mV"/>

                <channelDensity condDensity="20.96737 mS_per_cm2" id="kslow_basal_dend_group" ionChannel="kslow" segmentGroup="basal_dend_group" ion="k" erev="-100.0 mV"/>

                <channelDensity condDensity="3000.0 mS_per_cm2" id="na_nodes_group" ionChannel="na__vshifth3__vshiftm7" segmentGroup="nodes_group" ion="na" erev="60.0 mV"/>

                <channelDensity condDensity="3000.0 mS_per_cm2" id="na_iseg_group" ionChannel="na__vshifth3__vshiftm7" segmentGroup="iseg_group" ion="na" erev="60.0 mV"/>

                <channelDensity condDensity="3000.0 mS_per_cm2" id="na_hill_group" ionChannel="na__vshifth3__vshiftm7" segmentGroup="hill_group" ion="na" erev="60.0 mV"/>

                <channelDensity condDensity="35.2142 mS_per_cm2" id="na_soma_group" ionChannel="na__vshifthmin9_60842__vshiftmmin10_9975" segmentGroup="soma_group" ion="na" erev="60.0 mV"/>

                <channelDensity condDensity="35.2142 mS_per_cm2" id="na_myelin_group" ionChannel="na__vshifthmin9_60842__vshiftmmin10_9975" segmentGroup="myelin_group" ion="na" erev="60.0 mV"/>

                <channelDensity condDensity="35.2142 mS_per_cm2" id="na_basal_dend_group" ionChannel="na__vshifthmin9_60842__vshiftmmin10_9975" segmentGroup="basal_dend_group" ion="na" erev="60.0 mV"/>

                <channelDensity condDensity="20.0 mS_per_cm2" id="pas_nodes_group" ionChannel="pas" segmentGroup="nodes_group" erev="-47.8446 mV" ion="non_specific"/>

                <channelDensity condDensity="0.0387414 mS_per_cm2" id="pas_soma_iseg_hill_myelin_group" ionChannel="pas" segmentGroup="soma_iseg_hill_myelin_group" erev="-47.8446 mV" ion="non_specific"/>

                <channelDensity condDensity="0.0774827 mS_per_cm2" id="pas_dendrite_group" ionChannel="pas" segmentGroup="dendrite_group" erev="-47.8446 mV" ion="non_specific"/>

                <channelDensity condDensity="0.318076 mS_per_cm2" id="sk_soma_group" ionChannel="sk" segmentGroup="soma_group" ion="k" erev="-100.0 mV"/>

                <channelDensity condDensity="0.0524016 mS_per_cm2" id="sk_basal_dend_group" ionChannel="sk" segmentGroup="basal_dend_group" ion="k" erev="-100.0 mV"/>

                <channelDensityGHK permeability="0.00314901 cm_per_s" id="car_soma_group" ionChannel="car" segmentGroup="soma_group" ion="ca"/>

                <channelDensityGHK permeability="4e-5 cm_per_s" id="car_hill_group" ionChannel="car" segmentGroup="hill_group" ion="ca"/>

                <channelDensityGHK permeability="0.00314901 cm_per_s" id="car_basal_dend_group" ionChannel="car" segmentGroup="basal_dend_group" ion="ca"/>

                <channelDensityGHK permeability="9.27521e-05 cm_per_s" id="cah_soma_group" ionChannel="cah" segmentGroup="soma_group" ion="ca"/>

                <channelDensityGHK permeability="2e-04 cm_per_s" id="cah_hill_group" ionChannel="cah" segmentGroup="hill_group" ion="ca"/>

                <channelDensityGHK permeability="9.27521e-5 cm_per_s" id="cah_basal_dend_group" ionChannel="cah" segmentGroup="basal_dend_group" ion="ca"/>

                <!--bk with param: gmax = f(p) = (1.22971E-9 * H(1.22971E-9 - ((6.38741E-10 + ((p - 16.229) * ((1.22971E-9 - 6.38741E-10) / 27.5943))) * (H(27.5943 - (p - 16.229)) + (1.22971E-9 * H((-1) * (27.5943 - (p - 16.229)))))))) + ((((6.38741E-10 + (((p - 16.229) * (1.22971E-9 - 6.38741E-10)) / 27.5943)) * H(27.5943 - (p - 16.229))) + (1.22971E-9 * H((-1) * (27.5943 - (p - 16.229))))) * H((-1) * ((1.22971E-9 - ((6.38741E-10 + (((p - 16.229) * (1.22971E-9 - 6.38741E-10)) / 27.5943)) * H(27.5943 - (p - 16.229)))) + (1.22971E-9 * H((-1) * (27.5943 - (p - 16.229))))))) on ParameterisedGroup: PathLengthApicalDends on: apical_dend_group with metric: Path Length from root (NO_TRANSLATION, NO_NORMALISATION), var: p-->

                <channelDensityNonUniform id="bk_apical_dend_group" ionChannel="bk" ion="k" erev="-100.0 mV">
                    <variableParameter parameter="condDensity" segmentGroup="apical_dend_group">
                        <inhomogeneousValue inhomogeneousParameter="PathLengthApicalDends" value="1.0E9 *( (1.22971E-9 * H(1.22971E-9 - ((6.38741E-10 + ((p - 16.229) * ((1.22971E-9 - 6.38741E-10) / 27.5943))) * (H(27.5943 - (p - 16.229)) + (1.22971E-9 * H((-1) * (27.5943 - (p - 16.229)))))))) + ((((6.38741E-10 + (((p - 16.229) * (1.22971E-9 - 6.38741E-10)) / 27.5943)) * H(27.5943 - (p - 16.229))) + (1.22971E-9 * H((-1) * (27.5943 - (p - 16.229))))) * H((-1) * ((1.22971E-9 - ((6.38741E-10 + (((p - 16.229) * (1.22971E-9 - 6.38741E-10)) / 27.5943)) * H(27.5943 - (p - 16.229)))) + (1.22971E-9 * H((-1) * (27.5943 - (p - 16.229))))))) )"/>    <!--Note: conversion factor (1.0E9 * ) included to convert to units: GENESIS SI Units-->

                    </variableParameter>
                </channelDensityNonUniform>

                <!--iA with param: gmax = f(p) = 2.82824E-8 + (3.3165E-7 * exp(((-1) * 0.0117721) * (p - 16.229))) on ParameterisedGroup: PathLengthApicalDends on: apical_dend_group with metric: Path Length from root (NO_TRANSLATION, NO_NORMALISATION), var: p-->

                <channelDensityNonUniform id="iA_apical_dend_group" ionChannel="iA" ion="k" erev="-100.0 mV">
                    <variableParameter parameter="condDensity" segmentGroup="apical_dend_group">
                        <inhomogeneousValue inhomogeneousParameter="PathLengthApicalDends" value="1.0E9 *( 2.82824E-8 + (3.3165E-7 * exp(((-1) * 0.0117721) * (p - 16.229))) )"/>    <!--Note: conversion factor (1.0E9 * ) included to convert to units: GENESIS SI Units-->

                    </variableParameter>
                </channelDensityNonUniform>

                <!--iH with param: gmax = f(p) = 2.5117E-9 + (1.18437E-7 / (1 + exp(((-1) * 0.0137979) * ((p - 16.229) - 351.814)))) on ParameterisedGroup: PathLengthApicalDends on: apical_dend_group with metric: Path Length from root (NO_TRANSLATION, NO_NORMALISATION), var: p-->

                <channelDensityNonUniform id="iH_apical_dend_group" ionChannel="iH__q101_44732" ion="h" erev="-33.0 mV">
                    <variableParameter parameter="condDensity" segmentGroup="apical_dend_group">
                        <inhomogeneousValue inhomogeneousParameter="PathLengthApicalDends" value="1.0E9 *( 2.5117E-9 + (1.18437E-7 / (1 + exp(((-1) * 0.0137979) * ((p - 16.229) - 351.814)))) )"/>    <!--Note: conversion factor (1.0E9 * ) included to convert to units: GENESIS SI Units-->

                    </variableParameter>
                </channelDensityNonUniform>

                <!--kslow with param: gmax = f(p) = 3.78767E-9 + (2.05886E-7 * exp(((-1) * 0.0915783) * (p - 16.229))) on ParameterisedGroup: PathLengthApicalDends on: apical_dend_group with metric: Path Length from root (NO_TRANSLATION, NO_NORMALISATION), var: p-->

                <channelDensityNonUniform id="kslow_apical_dend_group" ionChannel="kslow" ion="k" erev="-100.0 mV">
                    <variableParameter parameter="condDensity" segmentGroup="apical_dend_group">
                        <inhomogeneousValue inhomogeneousParameter="PathLengthApicalDends" value="1.0E9 *( 3.78767E-9 + (2.05886E-7 * exp(((-1) * 0.0915783) * (p - 16.229))) )"/>    <!--Note: conversion factor (1.0E9 * ) included to convert to units: GENESIS SI Units-->

                    </variableParameter>
                </channelDensityNonUniform>

                <!--na with param: gmax = f(p) = (5.64519E-8 * H(5.64519E-8 - ((3.52142E-7 + ((p - 16.229) * ((5.64519E-8 - 3.52142E-7) / 480.929))) * (H(480.929 - (p - 16.229)) + (5.64519E-8 * H((-1) * (480.929 - (p - 16.229)))))))) + ((((3.52142E-7 + (((p - 16.229) * (5.64519E-8 - 3.52142E-7)) / 480.929)) * H(480.929 - (p - 16.229))) + (5.64519E-8 * H((-1) * (480.929 - (p - 16.229))))) * H((-1) * ((5.64519E-8 - ((3.52142E-7 + (((p - 16.229) * (5.64519E-8 - 3.52142E-7)) / 480.929)) * H(480.929 - (p - 16.229)))) + (5.64519E-8 * H((-1) * (480.929 - (p - 16.229))))))) on ParameterisedGroup: PathLengthApicalDends on: apical_dend_group with metric: Path Length from root (NO_TRANSLATION, NO_NORMALISATION), var: p-->

                <channelDensityNonUniform id="na_apical_dend_group" ionChannel="na__vshifthmin9_60842__vshiftmmin10_9975" ion="na" erev="60.0 mV">
                    <variableParameter parameter="condDensity" segmentGroup="apical_dend_group">
                        <inhomogeneousValue inhomogeneousParameter="PathLengthApicalDends" value="1.0E9 *( (5.64519E-8 * H(5.64519E-8 - ((3.52142E-7 + ((p - 16.229) * ((5.64519E-8 - 3.52142E-7) / 480.929))) * (H(480.929 - (p - 16.229)) + (5.64519E-8 * H((-1) * (480.929 - (p - 16.229)))))))) + ((((3.52142E-7 + (((p - 16.229) * (5.64519E-8 - 3.52142E-7)) / 480.929)) * H(480.929 - (p - 16.229))) + (5.64519E-8 * H((-1) * (480.929 - (p - 16.229))))) * H((-1) * ((5.64519E-8 - ((3.52142E-7 + (((p - 16.229) * (5.64519E-8 - 3.52142E-7)) / 480.929)) * H(480.929 - (p - 16.229)))) + (5.64519E-8 * H((-1) * (480.929 - (p - 16.229))))))) )"/>    <!--Note: conversion factor (1.0E9 * ) included to convert to units: GENESIS SI Units-->
                    </variableParameter>
                </channelDensityNonUniform>

                <!--sk with param: gmax = f(p) = (5.24016E-10 * H(5.24016E-10 - ((3.18076E-9 + ((p - 16.229) * ((5.24016E-10 - 3.18076E-9) / 238.75))) * (H(238.75 - (p - 16.229)) + (5.24016E-10 * H((-1) * (238.75 - (p - 16.229)))))))) + ((((3.18076E-9 + (((p - 16.229) * (5.24016E-10 - 3.18076E-9)) / 238.75)) * H(238.75 - (p - 16.229))) + (5.24016E-10 * H((-1) * (238.75 - (p - 16.229))))) * H((-1) * ((5.24016E-10 - ((3.18076E-9 + (((p - 16.229) * (5.24016E-10 - 3.18076E-9)) / 238.75)) * H(238.75 - (p - 16.229)))) + (5.24016E-10 * H((-1) * (238.75 - (p - 16.229))))))) on ParameterisedGroup: PathLengthApicalDends on: apical_dend_group with metric: Path Length from root (NO_TRANSLATION, NO_NORMALISATION), var: p-->

                <channelDensityNonUniform id="sk_apical_dend_group" ionChannel="sk" ion="k" erev="-100.0 mV">
                    <variableParameter parameter="condDensity" segmentGroup="apical_dend_group">
                        <inhomogeneousValue inhomogeneousParameter="PathLengthApicalDends" value="1.0E9 *( (5.24016E-10 * H(5.24016E-10 - ((3.18076E-9 + ((p - 16.229) * ((5.24016E-10 - 3.18076E-9) / 238.75))) * (H(238.75 - (p - 16.229)) + (5.24016E-10 * H((-1) * (238.75 - (p - 16.229)))))))) + ((((3.18076E-9 + (((p - 16.229) * (5.24016E-10 - 3.18076E-9)) / 238.75)) * H(238.75 - (p - 16.229))) + (5.24016E-10 * H((-1) * (238.75 - (p - 16.229))))) * H((-1) * ((5.24016E-10 - ((3.18076E-9 + (((p - 16.229) * (5.24016E-10 - 3.18076E-9)) / 238.75)) * H(238.75 - (p - 16.229)))) + (5.24016E-10 * H((-1) * (238.75 - (p - 16.229))))))) )"/>    <!--Note: conversion factor (1.0E9 * ) included to convert to units: GENESIS SI Units-->
                    </variableParameter>
                </channelDensityNonUniform>

                <!-- cah with param: permeability = f(p) = ((9.27521E-7 + (((p - 16.229) * (1.55847E-6 - 9.27521E-7)) / 10.3458)) * H(10.3458 - (p - 16.229))) + (1.55847E-6 * H((-1) * (10.3458 - (p - 16.229)))) -->
                <channelDensityNonUniformGHK id="cah_apical_dend_group" ionChannel="cah" ion="ca">
                    <variableParameter parameter="permeability" segmentGroup="apical_dend_group">
                        <inhomogeneousValue inhomogeneousParameter="PathLengthApicalDends" value=" ( ((9.27521E-7 + (((p - 16.229) * (1.55847E-6 - 9.27521E-7)) / 10.3458)) * H(10.3458 - (p - 16.229))) + (1.55847E-6 * H((-1) * (10.3458 - (p - 16.229)))) )"/>
                    </variableParameter>
                </channelDensityNonUniformGHK>

                <!-- car with param: permeability = f(p) = ((3.14901E-5 + (((p - 16.229) * (4.88401E-6 - 3.14901E-5)) / 924.858)) * H(924.858 - (p - 16.229))) + (4.88401E-6 * H((-1) * (924.858 - (p - 16.229))))  -->
                <channelDensityNonUniformGHK id="car_apical_dend_group" ionChannel="car" ion="ca">
                    <variableParameter parameter="permeability" segmentGroup="apical_dend_group">
                        <inhomogeneousValue inhomogeneousParameter="PathLengthApicalDends" value="( ((3.14901E-5 + (((p - 16.229) * (4.88401E-6 - 3.14901E-5)) / 924.858)) * H(924.858 - (p - 16.229))) + (4.88401E-6 * H((-1) * (924.858 - (p - 16.229)))) ) "/>
                    </variableParameter>
                </channelDensityNonUniformGHK>

                <spikeThresh value="0.0 mV"/>

                <specificCapacitance segmentGroup="dendrite_group" value="1.20408 uF_per_cm2"/>

                <specificCapacitance segmentGroup="myelin_group" value="0.04 uF_per_cm2"/>

                <specificCapacitance segmentGroup="soma_iseg_hill_nodes_group" value="0.602042 uF_per_cm2"/>

                <initMembPotential value="-70.0 mV"/>

            </membraneProperties>

            <intracellularProperties>

                <species id="ca" ion="ca" concentrationModel="cad" initialConcentration="5.0E-11 mol_per_cm3" initialExtConcentration="2.0E-6 mol_per_cm3"/>

                <resistivity value="0.120438 kohm_cm"/>

            </intracellularProperties>

        </biophysicalProperties>

    </cell>

</neuroml>
