<neuroml xmlns="http://www.neuroml.org/schema/neuroml2" xmlns:ns_1="http://www.w3.org/2001/XMLSchema-instance" ns_1:schemaLocation="http://www.neuroml.org/schema/neuroml2 https://raw.github.com/NeuroML/NeuroML2/development/Schemas/NeuroML2/NeuroML_v2beta2.xsd" id="car">

    <notes>ChannelML file containing a single Medium Voltage Activated (MVA) Ca Channel description from a cortical layer V pyramidal neuron, described in Keren, N., Peled, N., and Korngreen, A. (2005). Constraining compartmental models using multiple voltage recordings and genetic algorithms. Journal of neurophysiology, 94(6), 3730&#8211;42.</notes>

    <ionChannel id="car" conductance="10pS" type="ionChannelHH" species="ca">

        <notes>ChannelML file containing a single Medium Voltage Activated (MVA) Ca Channel description from a cortical layer V pyramidal neuron, described in Keren, N., Peled, N., and Korngreen, A. (2005). Constraining compartmental models using multiple voltage recordings and genetic algorithms. Journal of neurophysiology, 94(6), 3730&#8211;42.</notes>

        <annotation>
            <rdf:RDF xmlns:rdf="http://www.w3.org/1999/02/22-rdf-syntax-ns#">
                <rdf:Description rdf:about="car">

                    <bqmodel:isDescribedBy xmlns:bqmodel="http://biomodels.net/model-qualifiers/">
                        <rdf:Bag>
                            <rdf:li>Almog, Mara and Korngreen, Alon. A quantitative description of dendritic conductances and its application to dendritic excitation in layer 5 pyramidal neurons. J Neurosci 2013</rdf:li>
                            <rdf:li rdf:resource="http://www.ncbi.nlm.nih.gov/pubmed/"/>
                        </rdf:Bag>
                    </bqmodel:isDescribedBy>

                </rdf:Description>
            </rdf:RDF>
        </annotation>

        <gate id="m" type="gateHHtauInf" instances="2">
            <q10Settings type="q10ExpTemp" q10Factor="1" experimentalTemp="24 degC"/>
            <timeCourse type="car_m_tau_tau"/>
            <steadyState type="car_m_inf_inf"/>
        </gate>

        <gate id="h" type="gateHHtauInf" instances="1">
            <q10Settings type="q10ExpTemp" q10Factor="1" experimentalTemp="24 degC"/>
            <timeCourse type="car_h_tau_tau"/>
            <steadyState type="car_h_inf_inf"/>
        </gate>

    </ionChannel>

    <ComponentType name="car_m_tau_tau" extends="baseVoltageDepTime">
        <Constant name="TIME_SCALE" dimension="time" value="1 ms"/>
        <Constant name="VOLT_SCALE" dimension="voltage" value="1 mV"/>
        <Constant name="pbar" dimension="none" value=".4e-4">
            <!--Note: this parameter should instead be defined only once within the ionChannel!-->
        </Constant>
        <Constant name="shift" dimension="none" value="2">
            <!--Note: this parameter should instead be defined only once within the ionChannel!-->
        </Constant>
        <Constant name="shifth" dimension="none" value="0">
            <!--Note: this parameter should instead be defined only once within the ionChannel!-->
        </Constant>
        <Constant name="qm" dimension="none" value="1">
            <!--Note: this parameter should instead be defined only once within the ionChannel!-->
        </Constant>
        <Constant name="qh" dimension="none" value="1">
            <!--Note: this parameter should instead be defined only once within the ionChannel!-->
        </Constant>

        <Dynamics>
            <DerivedVariable name="V" dimension="none" value="v / VOLT_SCALE"/>
            <DerivedVariable name="t" exposure="t" dimension="time" value="(5.5/(cosh(0.032*(V+shift+23)))) * TIME_SCALE"/>
        </Dynamics>

    </ComponentType>

    <ComponentType name="car_m_inf_inf" extends="baseVoltageDepVariable">
        <Constant name="TIME_SCALE" dimension="time" value="1 ms"/>
        <Constant name="VOLT_SCALE" dimension="voltage" value="1 mV"/>
        <Constant name="pbar" dimension="none" value=".4e-4">
            <!--Note: this parameter should instead be defined only once within the ionChannel!-->
        </Constant>
        <Constant name="shift" dimension="none" value="2">
            <!--Note: this parameter should instead be defined only once within the ionChannel!-->
        </Constant>
        <Constant name="shifth" dimension="none" value="0">
            <!--Note: this parameter should instead be defined only once within the ionChannel!-->
        </Constant>
        <Constant name="qm" dimension="none" value="1">
            <!--Note: this parameter should instead be defined only once within the ionChannel!-->
        </Constant>
        <Constant name="qh" dimension="none" value="1">
            <!--Note: this parameter should instead be defined only once within the ionChannel!-->
        </Constant>

        <Dynamics>
            <DerivedVariable name="V" dimension="none" value="v / VOLT_SCALE"/>
            <DerivedVariable name="x" exposure="x" dimension="none" value="1/(1+exp(-(V+shift+23)/7.4))"/>
        </Dynamics>

    </ComponentType>

    <ComponentType name="car_h_tau_tau" extends="baseVoltageDepTime">
        <Constant name="TIME_SCALE" dimension="time" value="1 ms"/>
        <Constant name="VOLT_SCALE" dimension="voltage" value="1 mV"/>
        <Constant name="pbar" dimension="none" value=".4e-4">
            <!--Note: this parameter should instead be defined only once within the ionChannel!-->
        </Constant>
        <Constant name="shift" dimension="none" value="2">
            <!--Note: this parameter should instead be defined only once within the ionChannel!-->
        </Constant>
        <Constant name="shifth" dimension="none" value="0">
            <!--Note: this parameter should instead be defined only once within the ionChannel!-->
        </Constant>
        <Constant name="qm" dimension="none" value="1">
            <!--Note: this parameter should instead be defined only once within the ionChannel!-->
        </Constant>
        <Constant name="qh" dimension="none" value="1">
            <!--Note: this parameter should instead be defined only once within the ionChannel!-->
        </Constant>

        <Dynamics>
            <DerivedVariable name="V" dimension="none" value="v / VOLT_SCALE"/>
            <DerivedVariable name="t" exposure="t" dimension="time" value="(771/(cosh(0.047*(V+shifth+79)))) * TIME_SCALE"/>
        </Dynamics>

    </ComponentType>

    <ComponentType name="car_h_inf_inf" extends="baseVoltageDepVariable">
        <Constant name="TIME_SCALE" dimension="time" value="1 ms"/>
        <Constant name="VOLT_SCALE" dimension="voltage" value="1 mV"/>
        <Constant name="pbar" dimension="none" value=".4e-4">
            <!--Note: this parameter should instead be defined only once within the ionChannel!-->
        </Constant>
        <Constant name="shift" dimension="none" value="2">
            <!--Note: this parameter should instead be defined only once within the ionChannel!-->
        </Constant>
        <Constant name="shifth" dimension="none" value="0">
            <!--Note: this parameter should instead be defined only once within the ionChannel!-->
        </Constant>
        <Constant name="qm" dimension="none" value="1">
            <!--Note: this parameter should instead be defined only once within the ionChannel!-->
        </Constant>
        <Constant name="qh" dimension="none" value="1">
            <!--Note: this parameter should instead be defined only once within the ionChannel!-->
        </Constant>

        <Dynamics>
            <DerivedVariable name="V" dimension="none" value="v / VOLT_SCALE"/>
            <DerivedVariable name="x" exposure="x" dimension="none" value="1/(1+exp((V+shifth+79)/7.8))"/>
        </Dynamics>

    </ComponentType>

</neuroml>
