<?xml version="1.0" encoding="UTF-8"?>
<channelml xmlns="http://morphml.org/channelml/schema"
	   xmlns:xsi="http://www.w3.org/2001/XMLSchema-instance"
	   xmlns:meta="http://morphml.org/metadata/schema"
	   xsi:schemaLocation="http://morphml.org/channelml/schema http://www.neuroml.org/NeuroMLValidator/NeuroMLFiles/Schemata/v1.8.1/Level2/ChannelML_v1.8.1.xsd"
	   units="Physiological Units">

  <meta:notes>ChannelML file containing a single Medium Voltage Activated (MVA) Ca Channel description from a cortical layer V pyramidal neuron, described in Keren, N., Peled, N., and Korngreen, A. (2005). Constraining compartmental models using multiple voltage recordings and genetic algorithms. Journal of neurophysiology, 94(6), 3730–42.</meta:notes>

  <channel_type name="car_CML">

    <status value="in_progress">
      <meta:contributor>
        <meta:name>Boris Marin</meta:name>
      </meta:contributor>
    </status>

    <meta:authorList>
      <meta:modelAuthor>
        <meta:name>Mara Almog</meta:name>
      </meta:modelAuthor>
      <meta:modelAuthor>
        <meta:name>Alon Korngreen</meta:name>
      </meta:modelAuthor>
      <meta:modelTranslator>
        <meta:name>Boris Marin</meta:name>
        <meta:email>borismarin -at- gmail.com</meta:email>
      </meta:modelTranslator>
    </meta:authorList>

    <meta:publication>
      <meta:comment>Model described in this article</meta:comment>
      <meta:fullTitle>Almog, Mara and Korngreen, Alon. A quantitative description of dendritic conductances and its application to dendritic excitation in layer 5 pyramidal neurons. J Neurosci 2013</meta:fullTitle>
      <meta:pubmedRef>http://www.ncbi.nlm.nih.gov/pubmed/</meta:pubmedRef>
    </meta:publication>

    <parameters>
      <!-- The permeability pertains to the density, not to the channel -->
      <!-- <parameter name="pbar" value=".4e-4"/>  -->

      <!-- values are defined here due to name changes upon conversion to NeuroML -->
      <parameter name="shift" value="-9.67845"/>
      <parameter name="shifth" value="-2.1308"/>
      <parameter name="qm" value="1.15288"/>
      <parameter name="qh" value="1"/>
    </parameters>

    <current_voltage_relation cond_law="ohmic" ion="ca" charge="2" default_gmax="0" default_erev="120">

      <!-- TODO: can't use parameters here... -->
      <!-- should be qm, qh above -->
      <q10_settings q10_factor="1.15288" gate="m" experimental_temp="24"/>
      <q10_settings q10_factor="1" gate="h" experimental_temp="24"/>

      <gate name="m" instances="2">
        <closed_state id="mc"/>
        <open_state id="mo"/>
        <time_course name="tau" from="mc" to="mo" expr_form="generic" expr="5.5/(cosh(0.032*(v+shift+23)))"/>
        <steady_state name="inf" from="mc" to="mo" expr_form="generic" expr="1/(1+exp(-(v+shift+23)/7.4))"/>
      </gate>

      <gate name="h" instances="1">
        <closed_state id="hc"/>
        <open_state id="ho"/>
        <time_course name="tau" from="hc" to="ho" expr_form="generic" expr="771/(cosh(0.047*(v+shifth+79)))"/>
        <steady_state name="inf" from="hc" to="ho" expr_form="generic" expr="1/(1+exp((v+shifth+79)/7.8))"/>
      </gate>

    </current_voltage_relation>

  </channel_type>

</channelml>
