<?xml version="1.0" encoding="UTF-8"?>
<channelml xmlns="http://morphml.org/channelml/schema"
    xmlns:xsi="http://www.w3.org/2001/XMLSchema-instance"
    xmlns:meta="http://morphml.org/metadata/schema"
    xsi:schemaLocation="http://morphml.org/channelml/schema http://www.neuroml.org/NeuroMLValidator/NeuroMLFiles/Schemata/v1.8.1/Level2/ChannelML_v1.8.1.xsd"
    units="Physiological Units">

    <meta:notes>ChannelML file containing a single H Channel description from a cortical layer V pyramidal neuron, described in Keren, N., Peled, N., and Korngreen, A. (2005). Constraining compartmental models using multiple voltage recordings and genetic algorithms. Journal of neurophysiology, 94(6), 3730-42.</meta:notes>

    <channel_type name="iH">

        <status value="in_progress">
            <meta:contributor>
        <meta:name>Boris Marin</meta:name>
            </meta:contributor>
        </status>

        <meta:authorList>
            <meta:modelAuthor>
                <meta:name>Mara Almog</meta:name>
            </meta:modelAuthor>
            <meta:modelAuthor>
                <meta:name>Alon Korngreen</meta:name>
            </meta:modelAuthor>
            <meta:modelTranslator>
                <meta:name>Boris Marin</meta:name>
                <meta:email>borismarin -at- gmail.com</meta:email>
            </meta:modelTranslator>
        </meta:authorList>

        <meta:publication>
            <meta:comment>Model transcribed from this article</meta:comment>
            <meta:fullTitle>Keren, N., Peled, N., and Korngreen, A. (2005). Constraining compartmental models using multiple voltage recordings and genetic algorithms. Journal of neurophysiology, 94(6), 3730-42</meta:fullTitle>
            <meta:pubmedRef>http://www.ncbi.nlm.nih.gov/pubmed/16093338</meta:pubmedRef>
        </meta:publication>

        <meta:publication>
            <meta:comment>Based on</meta:comment>
            <meta:fullTitle>Williams, S. R., and Stuart, G. J. (2000). Site Independence of EPSP Time Course Is Mediated by Dendritic Ih in Neocortical Pyramidal Neurons. J Neurophysiol, 83(5), 3177-3182.</meta:fullTitle>
            <meta:pubmedRef>http://www.ncbi.nlm.nih.gov/pubmed/10805715</meta:pubmedRef>
        </meta:publication>

        <parameters>
            <parameter name="gbar" value="0.0"/>
            <parameter name="v05" value="-91"/>
            <parameter name="k" value="6"/>
            <parameter name="t0" value="0.0003933"/>
            <parameter name="t1" value="-0.0249"/>
            <parameter name="t2" value="0.0877"/>
            <parameter name="t3" value="0.062"/>

            <parameter name="temp" value="21"/>
            <parameter name="q10" value="2.3"/>
            <parameter name="vmin" value="-120"/>
            <parameter name="vmax" value="100"/>
        </parameters>

        <current_voltage_relation cond_law="ohmic" ion="h" charge="1" default_gmax="0" default_erev="-33">
	  <!-- ATTENTION: in the original .mod file, there is a temp=21 paramater,
	       but for this conductance temp is not used in the q10 calculation: a
	       hardcoded 22 is used instead -->
            <!-- <q10_settings q10_factor="2.3" experimental_temp="21"/> -->
            <q10_settings q10_factor="2.3" experimental_temp="22"/>

            <gate name="a" instances="1">
                <closed_state id="ac"/>
                <open_state id="a"/>
                <time_course name="tau" from="ac" to="a" expr_form="generic" expr="1/(t0*exp(t1*v)+t2*exp(t3*v))"/>
                <steady_state name="inf" from="ac" to="a" expr_form="generic" expr="1/(1 + exp((v-v05)/k))"/>
		<!-- TODO: neuroConstruct complains about using parameters in std expr as below -->
                <!-- <steady_state name="inf" from="ac" to="a" expr_form="sigmoid" rate="1" scale="k" midpoint="v05"/> -->
            </gate>
	</current_voltage_relation>

        <impl_prefs>
            <table_settings max_v="100" min_v="-120" table_divisions="199"/>
        </impl_prefs>

    </channel_type>

</channelml>
