<?xml version="1.0" encoding="UTF-8"?>
<channelml xmlns="http://morphml.org/channelml/schema" xmlns:xsi="http://www.w3.org/2001/XMLSchema-instance" xmlns:meta="http://morphml.org/metadata/schema" xsi:schemaLocation="http://morphml.org/channelml/schema http://www.neuroml.org/NeuroMLValidator/NeuroMLFiles/Schemata/v1.8.1/Level2/ChannelML_v1.8.1.xsd" units="Physiological Units">

    <meta:notes>ChannelML file containing a single Na Channel description from a cortical layer V pyramidal neuron, described in Keren, N., Peled, N., and Korngreen, A. (2005). Constraining compartmental models using multiple voltage recordings and genetic algorithms. Journal of neurophysiology, 94(6), 3730-42.</meta:notes>

    <channel_type name="na">

        <status value="in_progress">
            <meta:contributor>
        <meta:name>Boris Marin</meta:name>
            </meta:contributor>
        </status>

        <meta:authorList>
            <meta:modelAuthor>
                <meta:name>Mara Almog</meta:name>
            </meta:modelAuthor>
            <meta:modelAuthor>
                <meta:name>Alon Korngreen</meta:name>
            </meta:modelAuthor>
            <meta:modelTranslator>
                <meta:name>Boris Marin</meta:name>
                <meta:email>borismarin -at- gmail.com</meta:email>
            </meta:modelTranslator>
        </meta:authorList>

        <meta:publication>
            <meta:comment>Model transcribed from this article</meta:comment>
            <meta:fullTitle>Keren, N., Peled, N., and Korngreen, A. (2005). Constraining compartmental models using multiple voltage recordings and genetic algorithms. Journal of neurophysiology, 94(6), 3730-42</meta:fullTitle>
            <meta:pubmedRef>http://www.ncbi.nlm.nih.gov/pubmed/16093338</meta:pubmedRef>
        </meta:publication>

        <parameters>
            <parameter name="gbar" value="0.0"/>
            <parameter name="vshiftm" value="-5"/>
            <parameter name="vshifth" value="-10"/>
            <parameter name="taum_scale" value="1"/>
            <parameter name="tauh_scale" value="1"/>
            <parameter name="a1" value="0.058"/>
            <parameter name="a2" value="0.114"/>
            <parameter name="a3" value="-36"/>
            <parameter name="a4" value="28"/>
            <parameter name="v05m" value="-38"/>
            <parameter name="km" value="10"/>
            <parameter name="i1" value="0.28"/>
            <parameter name="i2" value="16.7"/>
            <parameter name="i3" value="-60"/>
            <parameter name="i4" value="25"/>
            <parameter name="v05h" value="-66"/>
            <parameter name="kh" value="-6"/>
            <parameter name="temp" value="21"/>
            <parameter name="q10" value="2.3"/>
            <parameter name="vmin" value="-120"/>
            <parameter name="vmax" value="100"/>
        </parameters>

        <current_voltage_relation cond_law="ohmic" ion="na" default_gmax="0" default_erev="60">

	    <!-- TODO: can't use q10 here
            <q10_settings q10_factor="q10" experimental_temp="temp"/>
	    -->
            <q10_settings q10_factor="2.3" experimental_temp="21"/>

            <gate name="m" instances="3">
                <closed_state id="mc"/>
                <open_state id="m"/>
                <time_course name="tau" from="mc" to="m" expr_form="generic" expr="a1+a2*exp(-((v+vshiftm-a3)/a4)^2)"/>
                <steady_state name="inf" from="mc" to="m" expr_form="generic" expr="1/(1+exp(-(v+vshiftm-v05m)/km))"/>
                <!-- TODO: can't use -km here
                <steady_state name="inf" from="mc" to="m" expr_form="sigmoid" rate="1" scale="-km" midpoint="v05m"/>
                -->

            </gate>

            <gate name="h" instances="1">
                <closed_state id="hc"/>
                <open_state id="h"/>
                <time_course name="tau" from="hc" to="h" expr_form="generic" expr="i1+i2*exp(-((v+vshifth-i3)/i4)^2)"/>
                <steady_state name="inf" from="hc" to="h" expr_form="generic" expr="1/(1+exp(-(v+vshifth-v05h)/kh))"/>
                <!-- same as above, use of -paramater in sigmoid def
                <steady_state name="inf" from="hc" to="h" expr_form="sigmoid" rate="1" scale="-kh" midpoint="v05h"/>
                -->

            </gate>
        </current_voltage_relation>

        <!-- <impl_prefs> -->
            <!-- : can't use pars vmin, vmax here?
            <table_settings max_v="vmax" min_v="vmin" table_divisions="199"/>
            -->
            <!-- <table_settings max_v="100" min_v="-120" table_divisions="199"/> -->
        <!-- </impl_prefs> -->

    </channel_type>

</channelml>
