<?xml version="1.0" encoding="UTF-8"?>
<channelml xmlns="http://morphml.org/channelml/schema"
	   xmlns:xsi="http://www.w3.org/2001/XMLSchema-instance"
	   xmlns:meta="http://morphml.org/metadata/schema"
	   xsi:schemaLocation="http://morphml.org/channelml/schema http://www.neuroml.org/NeuroMLValidator/NeuroMLFiles/Schemata/v1.8.1/Level2/ChannelML_v1.8.1.xsd"
	   units="Physiological Units">

  <meta:notes>ChannelML file containing a single SK Channel description, from a model of a Globus Pallidus neuron described in Deister, C. A., Chan, C. S., Surmeier, D. J., &amp; Wilson, C. J. (2009). Calcium-activated SK channels influence voltage-gated ion channels to determine the precision of firing in globus pallidus neurons. J Neurosci, 29(26), 8452–61. doi:10.1523/JNEUROSCI.0576-09.2009 </meta:notes>

  <channel_type name="sk">

    <status value="in_progress">
      <meta:contributor>
        <meta:name>Boris Marin</meta:name>
      </meta:contributor>
    </status>

    <meta:authorList>
      <meta:modelAuthor>
        <meta:name>Chris Deister</meta:name>
      </meta:modelAuthor>
      <meta:modelTranslator>
        <meta:name>Boris Marin</meta:name>
        <meta:email>borismarin -at- gmail.com</meta:email>
      </meta:modelTranslator>
    </meta:authorList>

    <meta:publication>
      <meta:comment>Model originally described in this article</meta:comment>
      <meta:fullTitle>Mercer JN, Chan CS, Tkatch T, Held J, Surmeier DJ. Nav1.6 sodium channels are critical to pacemaking and fast spiking in globus pallidus neurons.,J Neurosci. 2007 Dec 5;27(49):13552-66. </meta:fullTitle>
      <meta:pubmedRef>http://www.ncbi.nlm.nih.gov/pubmed/18057213</meta:pubmedRef>
    </meta:publication>

    <meta:modelDBref>
      <meta:comment>Original model version (but with different parameter values) in ModelDB</meta:comment>
      <meta:modelName>Nav1.6 sodium channel model in globus pallidus neurons (Mercer et al. 2007)</meta:modelName>
      <meta:uri>http://senselab.med.yale.edu/modeldb/ShowModel.asp?model=105385&amp;file=\gp\mod\sk_gp.mod</meta:uri>
    </meta:modelDBref>

    <parameters>
      <!-- TODO: parameters present in mod file but not used... -->
      <!-- <parameter name="n" value="4"/> -->
      <!-- <parameter name="cai" value="50.e-6"/> -->
      <parameter name="a0" value="1.3e4"/>
      <parameter name="b0" value="0.06"/>
      <parameter name="Cq10" value="3"/>
    </parameters>

    <current_voltage_relation cond_law="ohmic" ion="k" default_gmax="0" default_erev="-100">

      <conc_dependence name="Calcium" ion="ca" charge="2" variable_name="ca_conc" min_conc="1e-12" max_conc="1"/>

      <!-- TODO: Check multiplicative / divisive q10 -->
      <!-- TODO: can't use Cq10 parameter here... -->
      <q10_settings q10_factor="3" experimental_temp="22"/>

      <gate name="w" instances="1">
        <closed_state id="wc"/>
        <open_state id="wo"/>
        <time_course name="tau" from="wc" to="wo" expr_form="generic" expr="1/((a0 * ((1e6)*ca_conc)^4) + b0)"/>
        <steady_state name="inf" from="wc" to="wo" expr_form="generic" expr="1 / (1 + b0/(a0 * ((1e6)*ca_conc)^4))"/>
      </gate>

    </current_voltage_relation>

  </channel_type>

</channelml>
