<?xml version="1.0" encoding="UTF-8"?>
<neuroml xmlns="http://www.neuroml.org/schema/neuroml2" xmlns:xsi="http://www.w3.org/2001/XMLSchema-instance" xsi:schemaLocation="http://www.neuroml.org/schema/neuroml2  https://raw.github.com/NeuroML/NeuroML2/development/Schemas/NeuroML2/NeuroML_v2beta1.xsd" id="A140612_pas">

    <include href="pas.channel.nml"/>

    <cell id="A140612_pas">

        <notes>Cell: a_soma exported from NEURON ModelView</notes>

        <morphology id="morphology_A140612_pas">

            <segment id="0" name="Seg0_a_soma">
                <proximal x="-28.365" y="-16.1476" z="0.0553361" diameter="5.91798"/>
                <distal x="-27.6831" y="-17.6203" z="0.0531628" diameter="10.1259"/>
            </segment>

            <segment id="2" name="Seg1_a_soma">
                <parent segment="0"/>
                <distal x="-27.0012" y="-19.093" z="0.0509895" diameter="11.1723"/>
            </segment>

            <segment id="3" name="Seg2_a_soma">
                <parent segment="2"/>
                <distal x="-26.3192" y="-20.5656" z="0.0488163" diameter="12.2188"/>
            </segment>

            <segment id="4" name="Seg3_a_soma">
                <parent segment="3"/>
                <distal x="-25.6373" y="-22.0383" z="0.046643" diameter="13.2688"/>
            </segment>

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
            <segmentGroup id="a_soma">
                <member segment="0"/>

                <member segment="2"/>

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            </segmentGroup>

            <segmentGroup id="hill">
                <member segment="4205"/>

                <member segment="4206"/>

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            </segmentGroup>

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
            <segmentGroup id="ModelViewParmSubset_2">
                <include segmentGroup="a_soma"/>
                <include segmentGroup="hill"/>
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            </segmentGroup>

            <segmentGroup id="ModelViewParmSubset_4">
                <include segmentGroup="a_soma"/>
                <include segmentGroup="hill"/>
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            </segmentGroup>

            <segmentGroup id="ModelViewParmSubset_9">
                <include segmentGroup="a_soma"/>
                <include segmentGroup="dend_41"/>
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            </segmentGroup>

            <segmentGroup id="ModelViewParmSubset_15">
                <include segmentGroup="a_soma"/>
                <include segmentGroup="dend_41"/>
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            </segmentGroup>

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
            <segmentGroup id="ModelViewParmSubset_3">
                <include segmentGroup="apic_0"/>
                <include segmentGroup="dend_41"/>
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            </segmentGroup>

            <segmentGroup id="ModelViewParmSubset_6">
                <include segmentGroup="apic_0"/>
                <include segmentGroup="dend_41"/>
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            </segmentGroup>

            <segmentGroup id="ModelViewParmSubset_10">
                <include segmentGroup="apic_0"/>
                <include segmentGroup="apic_76"/>
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            </segmentGroup>

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
            <segmentGroup id="ModelViewParmSubset_5">
                <include segmentGroup="node_0"/>
                <include segmentGroup="node_1"/>
            </segmentGroup>

            <segmentGroup id="OneSecGrp_SectionRef_37">
                <include segmentGroup="apic_80"/>
            </segmentGroup>

            <segmentGroup id="OneSecGrp_SectionRef_38">
                <include segmentGroup="apic_77"/>
            </segmentGroup>

            <segmentGroup id="OneSecGrp_SectionRef_39">
                <include segmentGroup="apic_73"/>
            </segmentGroup>

            <segmentGroup id="OneSecGrp_SectionRef_40">
                <include segmentGroup="apic_2"/>
            </segmentGroup>

            <segmentGroup id="ModelViewParmSubset_1">
                <include segmentGroup="myelin_0"/>
                <include segmentGroup="myelin_1"/>
            </segmentGroup>

            <segmentGroup id="OneSecGrp_SectionRef_60">
                <include segmentGroup="apic_82"/>
            </segmentGroup>

            <segmentGroup id="OneSecGrp_SectionRef_61">
                <include segmentGroup="apic_81"/>
            </segmentGroup>

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
        </morphology>

            <!--Adding the biophysical parameters-->

        <biophysicalProperties id="biophys">

            <membraneProperties>

                <channelDensity condDensity="-1.0E8 mS_per_cm2" id="pas_all" ionChannel="pas" erev="-47.8446 mV" ion="non_specific"/>

                <channelDensity condDensity="20.0 mS_per_cm2" id="pas_ModelViewParmSubset_5" ionChannel="pas" segmentGroup="ModelViewParmSubset_5" ion="non_specific" erev="-59.4 mV"/>

                <channelDensity condDensity="0.0387414 mS_per_cm2" id="pas_ModelViewParmSubset_4" ionChannel="pas" segmentGroup="ModelViewParmSubset_4" ion="non_specific" erev="-59.4 mV"/>

                <channelDensity condDensity="0.0774827 mS_per_cm2" id="pas_ModelViewParmSubset_3" ionChannel="pas" segmentGroup="ModelViewParmSubset_3" ion="non_specific" erev="-59.4 mV"/>

                <spikeThresh value="0 mV"/>

                <specificCapacitance segmentGroup="ModelViewParmSubset_2" value="0.602042 uF_per_cm2"/>

                <specificCapacitance segmentGroup="ModelViewParmSubset_3" value="1.20408 uF_per_cm2"/>

                <specificCapacitance segmentGroup="ModelViewParmSubset_1" value="0.04 uF_per_cm2"/>

                <initMembPotential value="-65.0 mV"/>

            </membraneProperties>

            <intracellularProperties>

                <resistivity value="0.120438 kohm_cm"/>

            </intracellularProperties>

        </biophysicalProperties>

    </cell>

</neuroml>
