<?xml version="1.0" encoding="UTF-8"?>
<channelml xmlns="http://morphml.org/channelml/schema"
           xmlns:xsi="http://www.w3.org/2001/XMLSchema-instance"
           xmlns:meta="http://morphml.org/metadata/schema"
           xsi:schemaLocation="http://morphml.org/channelml/schema   ../../Schemata/v1.8.1/Level2/ChannelML_v1.8.1.xsd"
           units="Physiological Units">

  <meta:notes>Simple Calcium decay, transcribed from a Neuron .mod file written by Alain Destexhe (1992), and used in Almog, Mara and Korngreen, Alon. A quantitative description of dendritic conductances and its application to dendritic excitation in layer 5 pyramidal neurons. J Neurosci 2013</meta:notes>

  <ion name="ca" charge="2" role="SignallingSubstance">
    <meta:notes>Signifies that the ion is involved in a process which alters its concentration</meta:notes>
  </ion>

  <ion_concentration name="CaConc">

    <meta:notes>An expontially decaying pool of calcium</meta:notes>

    <ion_species name="ca"/>

    <decaying_pool_model resting_conc="1e-4" decay_constant="0.08">

      <fixed_pool_info>
        <phi>0.518213</phi>
      </fixed_pool_info>

    </decaying_pool_model>

  </ion_concentration>

</channelml>
