<?xml version="1.0" encoding="UTF-8"?>
<channelml xmlns="http://morphml.org/channelml/schema"
    xmlns:xsi="http://www.w3.org/2001/XMLSchema-instance"
    xmlns:meta="http://morphml.org/metadata/schema"
    xsi:schemaLocation="http://morphml.org/channelml/schema  ../../../../NeuroMLValidator/web/NeuroMLFiles/Schemata/v1.8.0/Level2/ChannelML_v1.8.0.xsd"
    units="Physiological Units">

    <meta:notes>ChannelML file containing a single fast K+ Channel description from a cortical layer V pyramidal neuron, described in Keren, N., Peled, N., and Korngreen, A. (2005). Constraining compartmental models using multiple voltage recordings and genetic algorithms. Journal of neurophysiology, 94(6), 3730–42.</meta:notes>

    <channel_type name="Kfast">

        <status value="in_progress">
            <meta:contributor>
        <meta:name>Boris Marin</meta:name>
            </meta:contributor>
        </status>

        <meta:authorList>
            <meta:modelAuthor>
                <meta:name>Mara Almog</meta:name>
            </meta:modelAuthor>
            <meta:modelAuthor>
                <meta:name>Alon Korngreen</meta:name>
            </meta:modelAuthor>
            <meta:modelTranslator>
                <meta:name>Boris Marin</meta:name>
                <meta:email>borismarin -at- gmail.com</meta:email>
            </meta:modelTranslator>
        </meta:authorList>

        <meta:publication>
            <meta:comment>Model transcribed from this article</meta:comment>
            <meta:fullTitle>Keren, N., Peled, N., and Korngreen, A. (2005). Constraining compartmental models using multiple voltage recordings and genetic algorithms. Journal of neurophysiology, 94(6), 3730–42</meta:fullTitle>
            <meta:pubmedRef>http://www.ncbi.nlm.nih.gov/pubmed/16093338</meta:pubmedRef>
        </meta:publication>

        <parameters>
            <parameter name="gbar" value="0.0"/>
            <parameter name="v05n" value="-47"/>
            <parameter name="v05l" value="-66"/>
            <parameter name="kn" value="29"/>
            <parameter name="kl" value="-10"/>
            <parameter name="qq" value="5"/>
            <parameter name="tq" value="-55"/>
            <parameter name="temp" value="21"/>
            <parameter name="q10" value="2.3"/>
            <parameter name="vmin" value="-120"/>
            <parameter name="vmax" value="100"/>
        </parameters>

        <current_voltage_relation cond_law="ohmic" ion="k">

            <q10_settings q10_factor="2.3" experimental_temp="21"/>

            <gate name="n" instances="4">
                <closed_state id="nc"/>
                <open_state id="n"/>
                <time_course name="tau" from="nc" to="n" expr_form="generic" expr="0.34+0.92*exp(-((v+71)/59)^2)"/>
                <steady_state name="inf" from="nc" to="n" expr_form="generic" expr="1/(1 + exp(-(v-v05n)/kn))"/>
            </gate>

            <gate name="l" instances="1">
                <closed_state id="lc"/>
                <open_state id="l"/>
                <time_course name="tau" from="lc" to="l" expr_form="generic" expr="8+49*exp(-((v+73)/23)^2)"/>
                <steady_state name="inf" from="lc" to="l" expr_form="generic" expr="1/(1 + exp(-(v-v05l)/kl))"/>
            </gate>
        </current_voltage_relation>

        <impl_prefs>
            <table_settings max_v="100" min_v="-120" table_divisions="199"/>
        </impl_prefs>

    </channel_type>

</channelml>
