<?xml version="1.0" encoding="UTF-8"?>
<channelml xmlns="http://morphml.org/channelml/schema"
    xmlns:xsi="http://www.w3.org/2001/XMLSchema-instance"
    xmlns:meta="http://morphml.org/metadata/schema"
    xsi:schemaLocation="http://morphml.org/channelml/schema  ../../../../NeuroMLValidator/web/NeuroMLFiles/Schemata/v1.8.0/Level2/ChannelML_v1.8.0.xsd"
    units="Physiological Units">

    <meta:notes>ChannelML file containing a single slow K+ Channel description from a cortical layer V pyramidal neuron, described in Keren, N., Peled, N., and Korngreen, A. (2005). Constraining compartmental models using multiple voltage recordings and genetic algorithms. Journal of neurophysiology, 94(6), 3730–42.</meta:notes>

    <channel_type name="Kslow">

        <status value="in_progress">
            <meta:contributor>
        <meta:name>Boris Marin</meta:name>
            </meta:contributor>
        </status>

        <meta:authorList>
            <meta:modelAuthor>
                <meta:name>Mara Almog</meta:name>
            </meta:modelAuthor>
            <meta:modelAuthor>
                <meta:name>Alon Korngreen</meta:name>
            </meta:modelAuthor>
            <meta:modelTranslator>
                <meta:name>Boris Marin</meta:name>
                <meta:email>borismarin -at- gmail.com</meta:email>
            </meta:modelTranslator>
        </meta:authorList>

        <meta:publication>
            <meta:comment>Model transcribed from this article</meta:comment>
            <meta:fullTitle>Keren, N., Peled, N., and Korngreen, A. (2005). Constraining compartmental models using multiple voltage recordings and genetic algorithms. Journal of neurophysiology, 94(6), 3730–42</meta:fullTitle>
            <meta:pubmedRef>http://www.ncbi.nlm.nih.gov/pubmed/16093338</meta:pubmedRef>
        </meta:publication>

        <parameters>
            <parameter name="gbar" value="0.0"/>
            <parameter name="vshift" value="0"  />
            <parameter name="v05a" value="-14.3"/>
            <parameter name="za" value="14.6"/>
            <parameter name="v05b" value="-58"/>
            <parameter name="zb" value="-11"/>
            <parameter name="a0" value="0.0052"/>
            <parameter name="a1" value="11.1"/>
            <parameter name="a2" value="13.1"/>
            <parameter name="a3" value="0.01938"/>
            <parameter name="a4" value="-1.27"/>
            <parameter name="a5" value="71"/>
            <parameter name="a6" value="-0.0053"/>
            <parameter name="b0" value="360"/>
            <parameter name="b11" value="1010"/>
            <parameter name="b2" value="-75"/>
            <parameter name="b3" value="48"/>
            <parameter name="b4" value="23.7"/>
            <parameter name="b5" value="-54"/>
            <parameter name="bb0" value="2350"/>
            <parameter name="bb1" value="1380"/>
            <parameter name="bb2" value="0.01118"/>
            <parameter name="bb3" value="-210"/>
            <parameter name="bb4" value="0.0306"/>
            <parameter name="temp" value="21"/>
            <parameter name="q10" value="2.3"/>
            <parameter name="vmin" value="-120"/>
            <parameter name="vmax" value="100"/>
        </parameters>

        <current_voltage_relation cond_law="ohmic" ion="k">

            <q10_settings q10_factor="2.3" experimental_temp="21"/>

            <gate name="a" instances="2">
                <closed_state id="ac"/>
                <open_state id="a"/>
                <!-- Padraig: does q10 work with alpha, beta or tau only? i.e. will alpha, beta be mult by q10^((t-t0)/10) ?-->
                <transition name="alpha_a" from="ac" to="a" expr_form="generic" expr="a0*(v-a1)/(1-exp(-(v-a1)/a2))"/>
                <transition name="beta_a" from="a" to="ac" expr_form="generic" expr="a3*exp(-(v-a4)/a5)+a6"/>
            </gate>

            <gate name="b" instances="1">
                <closed_state id="bc"/>
                <!-- Padraig: check fraction attribute -->
                <open_state id="b" fraction="0.5"/>
                <time_course name="tau" from="bc" to="b" expr_form="generic" expr="b0+(b11+b4*(v-b5))*exp(-(v-b2)*(v-b2)/(b3*b3))"/>
                <steady_state name="inf" from="bc" to="b" expr_form="generic" expr="1/(1 + exp(-(v-v05b)/zb))"/>
            </gate>

            <gate name="b1" instances="1">
                <closed_state id="b1c"/>
                <!-- Padraig: check fraction attribute -->
                <open_state id="b1" fraction="0.5"/>
                <time_course name="tau" from="b1c" to="b1" expr_form="generic" expr="bb0+bb1*exp(-bb2*v)+bb3*exp(-bb4*v)"/>
                <steady_state name="inf" from="b1c" to="b1" expr_form="generic" expr="1/(1 + exp(-(v-v05b)/zb))"/>
            </gate>
        </current_voltage_relation>

        <impl_prefs>
            <table_settings max_v="100" min_v="-120" table_divisions="199"/>
        </impl_prefs>

    </channel_type>

</channelml>
